// COMSOL Multiphysics 5.2.1.152 model "FlashLine-SteelScales-2220_54SiCr6_oxide6_graphite_00102001.mph"
// Outline of the model tree

Parameters
  Sample_diameter = 12.45[mm]
  Sample_thickness = 2.688[mm]  // without graphite coating
  Coating_thickness = 5[um]  // graphite coating thickness on one side
  Scales_thickness_upper = 220[um]
  Scales_thickness_bottom = 175[um]
  Scales_thickness_side = 140[um]
  Sample_emissivity = 0.8
  Sample_rho = 3242.290786[kg/m^3]
  Sample_k = 0.37[W/(m*K)]
  Sample_Cp = Sample_k/(Sample_a*Sample_rho)  // heat capacity
  Sample_a = 0.00474[cm^2/s]  // diffusivity
  Tinit = 799.76[degC]  // initial temperature
  LaserDiam = 12  // Diameter of laser heating spot [mm]
  InfraSensorDiam = 10[mm]  // Diameter of infrared spot
  ContactConductanceSampleRing = 0.02[W/(m*K)]  // Contact conductance between sample and molybdenum ring per length=1um
  LaserPower = 100000000
  Coating_emissivity = 0.97

Functions
  pw1: Piecewise "Laser" | funcname = Laser; arg = t; extrap = value; pieces = {0.00, 0.0003, LaserPower}; argunit = s; fununit = W/m^2
  int1: Interpolation "Interpolation LaserDistrib"
    funcname = LaserDistrib
    table = 
      {0, 1*6*6/(LaserDiam/2)^2}
      {2*LaserDiam/12, 0.99*6*6/(LaserDiam/2)^2}
      {3*LaserDiam/12, 0.97*6*6/(LaserDiam/2)^2}
      {4*LaserDiam/12, 0.9*6*6/(LaserDiam/2)^2}
      {5*LaserDiam/12, 0.7*6*6/(LaserDiam/2)^2}
      {6*LaserDiam/12, 0.3*6*6/(LaserDiam/2)^2}
      {7*LaserDiam/12, 0}
    interp = piecewisecubic
    argunit = mm
    fununit = 1

Geometry
  geom1 "Geometry 1" (2D axisymmetric, length unit mm)
    r7: Rectangle "Furnace" | pos = {0, -(30+6-1)-5}; size = {15/2+15+5, 30+6+2+6+25+10}
    r1: Rectangle "Argon in Furnace" | pos = {0, -(30+6-1)}; size = {15/2+15, 30+6+2+6+25}
    r2: Rectangle "AL2O3 ring upper" | pos = {15/2, 1+2}; size = {(30-15)/2, 6}
    pol1: Polygon "AL2O3 ring bottom"
      source = table
      table = {{16/2, 1}, {30/2, 1}, {30/2, -2-3}, {15/2, -2-3}, {15/2, -2}, {16/2, -2}}
    pol2: Polygon "Molybdenum ring"
      source = table
      table = {{11/2, 0}, {13/2, 0}, {13/2, 3}, {15.5/2, 3}, {15.5/2, -2}, {11/2, -2}}
    r3: Rectangle "Specimen without coating" | pos = {0, Coating_thickness}; size = {Sample_diameter/2, Sample_thickness}
    r6: Rectangle "Specimen core"
      pos = {0, Coating_thickness+Scales_thickness_bottom}
      size = {Sample_diameter/2-Scales_thickness_side, Sample_thickness-Scales_thickness_upper-Scales_thickness_bottom}
    r4: Rectangle "Coating upper"
      pos = {0, Coating_thickness+Sample_thickness}
      size = {Sample_diameter/2, Coating_thickness}
    r5: Rectangle "Coating bottom" | pos = {0, 0}; size = {Sample_diameter/2, Coating_thickness}
    r8: Rectangle "Contact layer" | pos = {11/2, -0.01}; size = {Sample_diameter/2-11/2, 0.01}
    pt1: Point | p = {0, 0}
    pt2: Point | p = {0.5, 0}
    pt3: Point | p = {1, 0}
    pt4: Point | p = {1.5, 0}
    pt5: Point | p = {2, 0}
    pt6: Point | p = {2.5, 0}
    pt7: Point | p = {3, 0}
    pt8: Point | p = {3.5, 0}
    pt9: Point | p = {4, 0}
    pt10: Point | p = {4.5, 0}
    pt11: Point | p = {5, 0}
    pt12: Point | p = {5.5, 0}
    pt14: Point | p = {5.5, -2}
    pt13: Point | p = {6, -2}
    pt15: Point | p = {6.5, -2}
    pt16: Point | p = {7, -2}
    fin: Finalize "Form Union"

Materials
  mat13: Common "Steel 54SiCr6 (2015-10-23)" on domains 5
    def "Basic"
      density = rho_54SiCr6(T)
      heatcapacity = C_54SiCr6(T)
      thermalconductivity = k_54SiCr6(T)
      int1: Interpolation "Interpolation rho" | funcname = rho_54SiCr6; table = {{20, 7700}, {25, 7700}}; argunit = degC; fununit = kg/m^3
      int2: Interpolation "Interpolation C" | funcname = C_54SiCr6; table = {{34, 500}, {102, 505}, {201, 542}, {299, 568}, {399, 607}, {498, 664}, {599, 749}, {698, 961}, {798, 641}, {899, 642}, {999, 662}}; argunit = degC; fununit = J/(kg*K)
      int3: Interpolation "Interpolation k" | funcname = k_54SiCr6; table = {{34, 28.6}, {102, 30.7}, {201, 32.5}, {299, 32.3}, {399, 31.6}, {498, 30.8}, {599, 29.4}, {698, 28.0}, {798, 24.4}, {899, 25.7}, {999, 27.6}}; argunit = degC; fununit = W/(m*K)
  mat6: Common "Sample" on domains 4
    def "Basic"
      density = Sample_rho
      heatcapacity = Sample_Cp
      thermalconductivity = Sample_k
      emissivity = Sample_emissivity
  mat8: Common "Sample surface" on boundaries 40
    // same settings as mat6
  mat5: Common "Thermographite TG2" on domains 3, 6
    def "Basic"
      density = rho_TG2(T)
      heatcapacity = C_TG2(T)
      thermalconductivity = k_TG2(T)
      emissivity = 0.97
      int1: Interpolation "Interpolation rho"
        funcname = rho_TG2
        table = 
          {25, 1823.1}
          {100, 1820.5}
          {200, 1817.1}
          {300, 1813.6}
          {400, 1810}
          {500, 1806.5}
          {600, 1802.8}
          {700, 1799}
          {800, 1795.3}
          {900, 1791.4}
          {1000, 1787.5}
          {1100, 1783.5}
          {1200, 1779.5}
          {1300, 1775.4}
          {1400, 1771.2}
          {1500, 1767}
          {1600, 1762.7}
          {1700, 1758.4}
          {1800, 1754}
          {1900, 1749.5}
          {2000, 1745}
          {2100, 1740.5}
          {2200, 1735.8}
          {2300, 1731.2}
          {2400, 1726.4}
        interp = piecewisecubic
        extrap = linear
        argunit = degC
        fununit = kg/m^3
      int2: Interpolation "Interpolation C"
        funcname = C_TG2
        table = 
          {25, 720.7}
          {100, 834.6}
          {200, 1147.3}
          {300, 1377.1}
          {400, 1551.6}
          {500, 1668.2}
          {600, 1744.6}
          {700, 1794.7}
          {800, 1828.6}
          {900, 1853.5}
          {1000, 1874.2}
          {1100, 1893.1}
          {1200, 1911.4}
          {1300, 1933}
          {1400, 1965}
          {1500, 1999}
          {1600, 2033}
          {1700, 2066}
          {1800, 2097}
          {1900, 2125}
          {2000, 2148}
          {2100, 2168}
          {2200, 2183}
          {2300, 2194}
          {2400, 2202.7}
        interp = piecewisecubic
        extrap = linear
        argunit = degC
        fununit = J/(kg*K)
      int3: Interpolation "Interpolation k"
        funcname = k_TG2
        table = {{25, 72.26}, {100, 71.41}, {200, 69.94}, {300, 67.91}, {400, 64.48}, {500, 60.42}, {600, 56.64}, {700, 53.34}, {800, 50.39}, {900, 47.71}, {1000, 45.26}, {1100, 43.08}, {1200, 41.16}, {1300, 39.64}, {1400, 38.60}, {1500, 37.69}, {1600, 36.52}}
        interp = piecewisecubic
        extrap = linear
        argunit = degC
        fununit = W/(m*K)
  mat9: Common "Thermographite TG2 surface" on boundaries 6, 16, 20-29, 34, 38, 41
    def "Basic"
      density = rho_TG2(T)
      heatcapacity = C_TG2(T)
      thermalconductivity = k_TG2(T)
      emissivity = Coating_emissivity
      int1: Interpolation "Interpolation rho"
        funcname = rho_TG2
        table = 
          {25, 1823.1}
          {100, 1820.5}
          {200, 1817.1}
          {300, 1813.6}
          {400, 1810}
          {500, 1806.5}
          {600, 1802.8}
          {700, 1799}
          {800, 1795.3}
          {900, 1791.4}
          {1000, 1787.5}
          {1100, 1783.5}
          {1200, 1779.5}
          {1300, 1775.4}
          {1400, 1771.2}
          {1500, 1767}
          {1600, 1762.7}
          {1700, 1758.4}
          {1800, 1754}
          {1900, 1749.5}
          {2000, 1745}
          {2100, 1740.5}
          {2200, 1735.8}
          {2300, 1731.2}
          {2400, 1726.4}
        interp = piecewisecubic
        extrap = linear
        argunit = degC
        fununit = kg/m^3
      int2: Interpolation "Interpolation C"
        funcname = C_TG2
        table = 
          {25, 720.7}
          {100, 834.6}
          {200, 1147.3}
          {300, 1377.1}
          {400, 1551.6}
          {500, 1668.2}
          {600, 1744.6}
          {700, 1794.7}
          {800, 1828.6}
          {900, 1853.5}
          {1000, 1874.2}
          {1100, 1893.1}
          {1200, 1911.4}
          {1300, 1933}
          {1400, 1965}
          {1500, 1999}
          {1600, 2033}
          {1700, 2066}
          {1800, 2097}
          {1900, 2125}
          {2000, 2148}
          {2100, 2168}
          {2200, 2183}
          {2300, 2194}
          {2400, 2202.7}
        interp = piecewisecubic
        extrap = linear
        argunit = degC
        fununit = J/(kg*K)
      int3: Interpolation "Interpolation k"
        funcname = k_TG2
        table = {{25, 72.26}, {100, 71.41}, {200, 69.94}, {300, 67.91}, {400, 64.48}, {500, 60.42}, {600, 56.64}, {700, 53.34}, {800, 50.39}, {900, 47.71}, {1000, 45.26}, {1100, 43.08}, {1200, 41.16}, {1300, 39.64}, {1400, 38.60}, {1500, 37.69}, {1600, 36.52}}
        interp = piecewisecubic
        extrap = linear
        argunit = degC
        fununit = W/(m*K)
  mat3: Common "Molybdenum FlashLine" on domains 7, 8
    def "Basic"
      thermalexpansioncoefficient = 4.8e-6[1/K]
      density = rho_Molybdenum(T)
      heatcapacity = C_Molybdenum(T)
      thermalconductivity = k_Molybdenum(T)
      emissivity = e_Molybdenum(T)
      int3: Interpolation "Interpolation rho"
        funcname = rho_Molybdenum
        table = 
          {100, 10228.3}
          {200, 10212.6}
          {300, 10196.8}
          {400, 10180.5}
          {500, 10163.7}
          {600, 10146}
          {700, 10127.7}
          {800, 10108.7}
          {900, 10089.1}
          {1000, 10068.8}
          {1100, 10047.8}
          {1200, 10026.1}
          {1300, 10003.7}
          {1400, 9980.5}
          {1500, 9956.2}
          {1600, 9930.6}
          {1700, 9903.6}
          {1800, 9875.3}
          {1900, 9845.4}
          {2000, 9813.7}
        interp = piecewisecubic
        extrap = linear
        argunit = degC
        fununit = kg/m^3
      int1: Interpolation "Interpolation C"
        funcname = C_Molybdenum
        table = {{100, 258.7}, {200, 267.5}, {300, 274.2}, {400, 279.8}, {500, 284.8}, {600, 289.4}, {700, 294.3}, {800, 299.7}, {900, 305.7}, {1000, 312.3}, {1100, 319.6}, {1200, 327.6}, {1300, 336.3}, {1400, 345.7}, {1500, 355.9}, {1600, 366.8}, {1700, 378.7}, {1800, 391.4}, {1900, 405.2}, {2000, 419.8}}
        interp = piecewisecubic
        extrap = linear
        argunit = degC
        fununit = J/(kg*K)
      int2: Interpolation "Interpolation k"
        funcname = k_Molybdenum
        table = {{100, 136.13}, {200, 131.24}, {300, 126.40}, {400, 122.67}, {500, 119.57}, {600, 116.79}, {700, 114.38}, {800, 112.43}, {900, 110.85}, {1000, 109.42}, {1100, 108.02}, {1200, 106.73}, {1300, 105.56}, {1400, 104.28}, {1500, 102.77}}
        interp = piecewisecubic
        extrap = linear
        argunit = degC
        fununit = W/(m*K)
      int4: Interpolation "Interpolation e" | funcname = e_Molybdenum; table = {{38, 0.06}, {260, 0.08}, {538, 0.11}, {1093, 0.18}}; interp = piecewisecubic; argunit = degC
    Enu "Young's modulus and Poisson's ratio"
      youngsmodulus = 3.12e11[Pa]
      poissonsratio = 0.30
    Murnaghan
      l = -3.0e11[Pa]
      m = -8.5e11[Pa]
      n = -9.1e11[Pa]
    Lame "Lamé parameters"
      lambLame = 1.8e11[Pa]
      muLame = 1.2e11[Pa]
  mat10: Common "Molybdenum FlashLine surface" on boundaries 30, 31, 33, 35, 37, 39, 42-45, 52
    // same settings as mat3
  mat4: Common "Al2O3 72% (korund)" on domains 1, 9, 10
    def "Basic"
      density = 2700[kg/m^3]
      heatcapacity = C_Al2O3_72(T)
      thermalconductivity = k_Al2O3_72(T)
      emissivity = 0.9
      int1: Interpolation "Interpolation C" | funcname = C_Al2O3_72; table = {{0, 670}, {20, 754}, {100, 921}, {500, 1172}, {1000, 1298}}; interp = piecewisecubic; argunit = degC; fununit = J/(kg*K)
      int2: Interpolation "Interpolation k" | funcname = k_Al2O3_72; table = {{0, 2.326}, {200, 2.175}, {400, 2.093}, {600, 2.035}, {800, 2}, {1000, 1.977}, {1200, 1.954}}; interp = piecewisecubic; argunit = degC; fununit = W/(m*K)
  mat11: Common "Al2O3 72% (korund) surface" on boundaries 4, 18, 46, 47, 49, 51, 53-59
    // same settings as mat4
  mat1: Common "Argon [gas]" on domains 2
    def "Basic"
      thermalconductivity = k_gas_4(T[1/K])[W/(m*K)]
      heatcapacity = C_gas_2(T[1/K])[J/(kg*K)]
      HC = HC_gas_2(T[1/K])[J/(mol*K)]
      density = rho_gas_3(T[1/K])[kg/m^3]
      TD = TD(T[1/K])[m^2/s]
      dynamicviscosity = eta(T[1/K])[Pa*s]
      ratioofspecificheat = 1.6
      k_gas_4: Piecewise
        arg = T
        pieces = 
          {88.0, 340.0, -2.420719E-4+7.233846E-5*T^1-5.020862E-8*T^2+2.864443E-11*T^3}
          {340.0, 690.0, -2.46709E-4+7.367416E-5*T^1-5.22509E-8*T^2+2.297758E-11*T^3}
          {690.0, 2500.0, 0.004222052+5.576743E-5*T^1-2.632101E-8*T^2+1.050359E-11*T^3-1.587964E-15*T^4}
      C_gas_2: Piecewise
        arg = T
        pieces = 
          {100.0, 6800.0, 520.3264}
          {6800.0, 10000.0, 737.3204-0.1356916*T^1+3.349874E-5*T^2-4.069944E-9*T^3+2.423156E-13*T^4-5.615953E-18*T^5}
          {10000.0, 20000.0, 3866.452-1.384217*T^1+2.278344E-4*T^2-1.859314E-8*T^3+7.466511E-13*T^4-1.159342E-17*T^5}
      HC_gas_2: Piecewise "Piecewise 2a"
        arg = T
        pieces = 
          {100.0, 6800.0, 20.786}
          {6800.0, 10000.0, 29.45447-0.005420606*T^1+1.338208E-6*T^2-1.625861E-10*T^3+9.680023E-15*T^4-2.24346E-19*T^5}
          {10000.0, 20000.0, 154.457-0.05529671*T^1+9.101531E-6*T^2-7.427587E-10*T^3+2.982722E-14*T^4-4.631341E-19*T^5}
      rho_gas_3: Piecewise | arg = T; pieces = {87.0, 3000.0, 522.2077*T^-1}
      TD: Piecewise
        arg = T
        pieces = 
          {50.0, 313.0, 1.473381E-7-4.058428E-9*T^1+2.637005E-10*T^2-1.823646E-13*T^3+8.210684E-17*T^4}
          {313.0, 3273.0, -7.696469E-6+5.101993E-8*T^1+1.233721E-10*T^2-1.523237E-14*T^3+1.553406E-18*T^4}
      eta: Piecewise
        arg = T
        pieces = 
          {50.0, 313.0, 1.543468E-6+4.229844E-8*T^1+3.145939E-10*T^2-1.058698E-12*T^3+1.095469E-15*T^4}
          {313.0, 3273.0, 2.823345E-6+7.51229E-8*T^1-3.008134E-11*T^2+8.881353E-15*T^3-1.007569E-18*T^4}
  mat12: Common "Contact Sample-Ring" on domains 8
    def "Basic"
      density = 1
      heatcapacity = 1000
      thermalconductivity = ContactConductanceSampleRing*10
      ratioofspecificheat = 1.4

Physics
  ht: HeatTransferInSolidsAndFluids "Heat Transfer" on all domains
    dependent variable T
    ShapeProperty.order_temperature = 1
    PhysicalModelProperty.SurfaceToSurfaceRadiation = 1
    solid1: SolidHeatTransferModel "Heat Transfer in Solids 1" (default)
      opq1: Opacity "Opaque 1" (default)
        opacity = 1
        opacitySolarB1 = 1
        opacitySolarB2 = 1
        opacityB1 = 1
        opacityB2 = 1
        opacityB3 = 1
        opacityB4 = 1
        opacityB5 = 1
    fluid1: FluidHeatTransferModel "Heat Transfer in Fluids 1" on domains 2, 8
      opac1: Opacity (default)
    init1: init "Initial Values 1" (default) | Tinit = Tinit
    axi1: AxialSymmetry (default)
    ins1: ThermalInsulation (default)
    temp1: TemperatureBoundary "Temperature of furnace" on boundaries 2, 19, 60 | T0 = Tinit
    ds1: DiffuseSurface "Diffuse Surfaces" on boundaries 4, 6, 16, 18, 20-31, 33-35, 37-47, 49, 51-59 | Tamb = T
    bhs1: BoundaryHeatSource "Boundary Heat Source from Laser" on boundaries 16 | Qb = Laser(t)*LaserDistrib(r)

Mesh
  mesh1 "Mesh 1" (physics-controlled)
    size: MeshSizeDefault | hauto = 5

Studies
  std1 "Study 1"
    time: Transient "Time Dependent"
      tlist = range(0,0.00001,0.0005) range(0.0006,0.0001,0.002) range(0.003,0.001,0.01-0.001) range(0.01,0.002,0.1-0.002) range(0.1,0.02,1-0.02) range(1,0.1,3) range(4,1,10)
      rtol = 1e-4

Solver configurations
  sol1 "Solution 1" (study std1)
    v1: Variables "Dependent Variables 1"
      comp1_T: Field "Temperature (comp1.T)" | scalemethod = auto
      comp1_ht_J: Field "Surface radiosity (comp1.ht.J)" | scalemethod = auto
    t1: Time "Time-Dependent Solver 1"
      tlist = range(0,0.00001,0.0005) range(0.0006,0.0001,0.002) range(0.003,0.001,0.01-0.001) range(0.01,0.002,0.1-0.002) range(0.1,0.02,1-0.02) range(1,0.1,3) range(4,1,10)
      rtol = 1e-4
      atolglobal = 5.0E-4
      timemethod = genalpha
      estrat = exclude
      tstepsgenalpha = manual
      timestepgenalpha = if(t<0.0005,0.000001,if(t<0.001,0.00001,if(t<0.01,0.0001,if(t<0.1,0.001,if(t<1,0.01,0.1)))))
      fc1: FullyCoupled | maxiter = 6; damp = 0.9; jtech = once
      d1: Direct | linsolver = pardiso
      prob1: SolverProblem "Information 1"
        warning1: SolverWarning "Warnings 1"

Datasets
  dset1: Solution | solution = sol1
  rev1: Revolve2D "Revolution 2D 1" | data = dset1; genpoints = {{0, 0}, {0, 1}}; startangle = -90; revangle = 225

Tables
  tbl1: Table
    // Line Average 1 (T)
    Time (s) | Temperature (degC)
    0 | 600
    1e-05 | 600
    2e-05 | 600
    3e-05 | 600
    4e-05 | 600
    5e-05 | 600
    6e-05 | 600
    7e-05 | 600
    8e-05 | 600
    9e-05 | 600
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  tbl2: Table
    // Line Average 1 (T)
    Sample_diameter (mm) | Sample_thickness (mm) | Sample_rho (kg/m^3) | Sample_a (cm^2/s) | Sample_k (W/(m*K)) | Coating_thickness (um) | Tinit (degC) | LaserDiam | t (s) | InfraSensorDiam=0.008, Temperature (degC) | InfraSensorDiam=0.01, Temperature (degC)
    12.709 | 2.47 | 7700 | 0.0509 | 29 | 5 | 600 | 12 | 0 | 600 | 600
    12.709 | 2.47 | 7700 | 0.0509 | 29 | 5 | 600 | 12 | 1e-05 | 600 | 600
    12.709 | 2.47 | 7700 | 0.0509 | 29 | 5 | 600 | 12 | 2e-05 | 600 | 600
    12.709 | 2.47 | 7700 | 0.0509 | 29 | 5 | 600 | 12 | 3e-05 | 600 | 600
    12.709 | 2.47 | 7700 | 0.0509 | 29 | 5 | 600 | 12 | 4e-05 | 600 | 600
    12.709 | 2.47 | 7700 | 0.0509 | 29 | 5 | 600 | 12 | 5e-05 | 600 | 600
    12.709 | 2.47 | 7700 | 0.0509 | 29 | 5 | 600 | 12 | 6e-05 | 600 | 600
    12.709 | 2.47 | 7700 | 0.0509 | 29 | 5 | 600 | 12 | 7e-05 | 600 | 600
    12.709 | 2.47 | 7700 | 0.0509 | 29 | 5 | 600 | 12 | 8e-05 | 600 | 600
    12.709 | 2.47 | 7700 | 0.0509 | 29 | 5 | 600 | 12 | 9e-05 | 600 | 600
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  tbl3: Table
    // Line Average 1 (T)
    Sample_diameter (mm) | Sample_thickness (mm) | Sample_rho (kg/m^3) | Sample_a (cm^2/s) | Sample_k (W/(m*K)) | Coating_thickness (um) | Tinit (degC) | LaserDiam | InfraSensorDiam (mm) | t (s) | Temperature (degC)
    12.709 | 2.47 | 7700 | 0.0509 | 29 | 5 | 600 | 10 | 8 | 0 | 600
    12.709 | 2.47 | 7700 | 0.0509 | 29 | 5 | 600 | 10 | 8 | 1e-05 | 600
    12.709 | 2.47 | 7700 | 0.0509 | 29 | 5 | 600 | 10 | 8 | 2e-05 | 600
    12.709 | 2.47 | 7700 | 0.0509 | 29 | 5 | 600 | 10 | 8 | 3e-05 | 600
    12.709 | 2.47 | 7700 | 0.0509 | 29 | 5 | 600 | 10 | 8 | 4e-05 | 600
    12.709 | 2.47 | 7700 | 0.0509 | 29 | 5 | 600 | 10 | 8 | 5e-05 | 600
    12.709 | 2.47 | 7700 | 0.0509 | 29 | 5 | 600 | 10 | 8 | 6e-05 | 600
    12.709 | 2.47 | 7700 | 0.0509 | 29 | 5 | 600 | 10 | 8 | 7e-05 | 600
    12.709 | 2.47 | 7700 | 0.0509 | 29 | 5 | 600 | 10 | 8 | 8e-05 | 600
    12.709 | 2.47 | 7700 | 0.0509 | 29 | 5 | 600 | 10 | 8 | 9e-05 | 600
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  tbl4: Table
    // Line Average 1 (T)
    Sample_diameter (mm) | Sample_thickness (mm) | Sample_rho (kg/m^3) | Sample_a (cm^2/s) | Sample_k (W/(m*K)) | Coating_thickness (um) | Tinit (degC) | LaserDiam | InfraSensorDiam (mm) | Time=0, Temperature (degC) | Time=1E-5, Temperature (degC) | Time=2E-5, Temperature (degC)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
    12.709 | 2.47 | 7700 | 0.0509 | 29 | 5 | 600 | 10 | 8 | 600 | 600 | 600
    12.709 | 2.47 | 7700 | 0.0509 | 29 | 5 | 600 | 10 | 10 | 600 | 600 | 600
    12.709 | 2.47 | 7700 | 0.0509 | 29 | 5 | 600 | 12 | 8 | 600 | 600 | 600
    12.709 | 2.47 | 7700 | 0.0509 | 29 | 5 | 600 | 12 | 10 | 600 | 600 | 600
  tbl5: Table
    // Line Average 1 (T)
    Sample_diameter (mm) | Sample_thickness (mm) | Sample_rho (kg/m^3) | Sample_a (cm^2/s) | Sample_k (W/(m*K)) | Coating_thickness (um) | Tinit (degC) | LaserDiam | InfraSensorDiam (mm) | Time=0, Temperature (degC) | Time=1E-5, Temperature (degC) | Time=2E-5, Temperature (degC)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
    12.709 | 2.47 | 7700 | 0.0509 | 29 | 5 | 600 | 10 | 8 | 600 | 600 | 600
    12.709 | 2.47 | 7700 | 0.0509 | 29 | 5 | 600 | 10 | 10 | 600 | 600 | 600
    12.709 | 2.47 | 7700 | 0.0509 | 29 | 5 | 600 | 12 | 8 | 600 | 600 | 600
    12.709 | 2.47 | 7700 | 0.0509 | 29 | 5 | 600 | 12 | 10 | 600 | 600 | 600
  tbl6: Table
    // Line Average 1 (T)
    Sample_diameter (mm) | Sample_thickness (mm) | Sample_rho (kg/m^3) | Sample_a (cm^2/s) | Sample_k (W/(m*K)) | Coating_thickness (um) | Tinit (degC) | LaserDiam | InfraSensorDiam (mm) | t (s) | Temperature (degC)
    12.709 | 2.47 | 7700 | 0.0509 | 29 | 5 | 600 | 10 | 8 | 0 | 600
    12.709 | 2.47 | 7700 | 0.0509 | 29 | 5 | 600 | 10 | 8 | 1e-05 | 600
    12.709 | 2.47 | 7700 | 0.0509 | 29 | 5 | 600 | 10 | 8 | 2e-05 | 600
    12.709 | 2.47 | 7700 | 0.0509 | 29 | 5 | 600 | 10 | 8 | 3e-05 | 600
    12.709 | 2.47 | 7700 | 0.0509 | 29 | 5 | 600 | 10 | 8 | 4e-05 | 600
    12.709 | 2.47 | 7700 | 0.0509 | 29 | 5 | 600 | 10 | 8 | 5e-05 | 600
    12.709 | 2.47 | 7700 | 0.0509 | 29 | 5 | 600 | 10 | 8 | 6e-05 | 600
    12.709 | 2.47 | 7700 | 0.0509 | 29 | 5 | 600 | 10 | 8 | 7e-05 | 600
    12.709 | 2.47 | 7700 | 0.0509 | 29 | 5 | 600 | 10 | 8 | 8e-05 | 600
    12.709 | 2.47 | 7700 | 0.0509 | 29 | 5 | 600 | 10 | 8 | 9e-05 | 600
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
Plots
  pg1: PlotGroup3D "Temperature, 3D (ht)" | data = rev1; axisnotation = auto; axiscommonexp = on; axistrailingzeros = off
    surf1: Surface
      data = rev1
      expr = T
      unit = degC
      typeintitle = on
      descriptionintitle = on
      expressionintitle = off
      unitintitle = on

Exports
  anim1: Animation | target = player; framesel = all; frametime = 0.5; options = off; axes = on; synchronize = off